WB := 0.38
TW := 0.32
WR := 0.075
wanted_wheel_vel := [1; 0; 0; 1]
wanted_robot_vel := [0.5; 0.5; 0]
inverse_kinematics := [1, 1, 1, 1; -1, 1, 1, -1; -1/(WB + TW), 1/(WB + TW), -1/(WB + TW), 1/(WB + TW)]
forward_kinematics := [1, -1, -(WB + TW); 1, 1, WB + TW; 1, 1, -(WB + TW); 1, -1, WB + TW]
needed_wheel_vel := forward_kinematics*wanted_robot_vel → [0.0; 1.0; 1.0; 0.0]
resulting_robot_vel := inverse_kinematics*needed_wheel_vel → [2.0; 2.0; 0.0]
